*Heading
Three-dimensional neuron migration
**
**	UNITS:	Length - meters, Time - sec, Angle - radians,
**		Temperature - Kelvin, Force - Newtons,
**		Stress - Newton/meter^2 = Pa, Mass - kilograms,
**		Density - kg/meter^3, Conductivity - Watt/m-K,
**		Specific Heat - J/m^3-K, Energy - Joules,
**	        Chemical potential - Joules/mole,
**		Fluid content - moles/volume
**
** Shuolun Wang
**
************************************************************************
**			PARAMETERS
************************************************************************
*Parameter
**	MATERIAL PROPERTIES
**
** smooth parameter for neuron cell migration
alpha = 0.1
alpha2 = 0.1
alpha3 = 0.1
**
** smooth parameter for source term
alpha_Gc = 0.05
alpha_Gc2 = 0.05
alpha_Gc3 = 0.05
**
** smooth parameter for velocity
alpha_v = 0.05
alpha_v2 = 0.05
alpha_v3 = 0.05
**
** smooth parameter for diffusivity
alpha_d = 1.0
alpha_d2 = 1.0
alpha_d3 = 1.0
**
** smooth parameter for stiffness
alpha_mu = 1.0
**
** smooth parameter for growth parameter
alpha_k = 20.0
**
**
** base value for source term (#/micro^3 day)
***Gc  = 0.0000141
***Gc2 = 0.0000141
***Gc3 = 0.0000141
***Gc  = 0.000030
***Gc2 = 0.0
***Gc3 = 0.0
Gc  = 0.000033
Gc2 = 0.0
Gc3 = 0.0
**
** base value for velocity (micro/day)
***vel =  1472.2
***vel2 = 1472.2
***vel3 = 1472.2
***vel =  1553.4
***vel2 = 1553.4
***vel3 = 1553.4
vel =  1473.857439
vel2 = 1473.857439
vel3 = 1473.857439
**
** diffusivity (micro^2/day)
***diff  = 31612.6
***diff2 = 31612.6
***diff3 = 31612.6
***diff  = 35000.0
***diff2 = 35000.0
***diff3 = 35000.0
diff  = 34600.7
diff2 = 34600.7
diff3 = 34600.7
**
** cell migration threshold
c0  = 1.0e-6
c02 = 1.0e-6
c03 = 1.0e-6
**
** shape parameter for growth
****k_s = 0.0
***k_s = 202950.0
***k_s = 300000.0
k_s = 244743.087327
betak = 1.0
k_c_normal = k_s*betak
k_c_para = k_s/betak
alpha_normal = 1.0
alpha_para = 1.0
**
** mechanical parameter(Pa)
lam_s = 930.0
mu_s = 100.0
**
** stiffness ratio
betaE = 3.0
lam_c = lam_s*betaE
mu_c = mu_s*betaE
**
** delta function parameter for Gc as function of time
epsilon1 = 20.0
epsilon2 = 20.0
epsilon3 = 20.0
**
**
** final destinations for three cohorts of cells
***delta_v1 = 191.6
***delta_v2 = 210.7
***delta_v3 = 222.7
***delta_v1 = 195.0
***delta_v2 = 100.0
***delta_v3 = 100.0
delta_v1 = 209.36
delta_v2 = 100.0
delta_v3 = 100.0
**
**
**	ELEMENT PROPERTIES
**
** number of volume integration points
nInt = 8
**
** number of local sdv's used in the solution
nlSdv = 11
**
** number of global sdv's used for visualization
ngSdv = 11
**
** number of element variables
nVars = nInt*nlSdv
**
**
**	BOUNDARY AND INITIAL CONDITIONS
**
** loading/irradiation times (days)
time1 = 8.0
time2 = 9.0
time3 = 10.0
**
**
**
** initial neuron cell density
initc = 0.0
initc2 = 0.0
initc3 = 0.0
**
**
************************************************************************
**		MODEL DEFINITION
************************************************************************
**
*System
       239.5,         9.9,        9.99,       239.5,         9.9,       10.99
       239.5,        10.9,        9.99
*Node
      1, 0.00999999978,  0.100000001,        239.5
      2, 0.00999999978,  -9.89999962,        239.5
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*User Element,Nodes=8,Type=U3,Iproperties=3,Properties=41,Coordinates=3,Variables=<nVars>,Unsymm
1,2,3,11,12,13
*Element, type=U3
 1,  61,  62,  64,  63,   1,   2,   4,   3
 2,  63,  64,  66,  65,   3,   4,   6,   5
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*System
*Nset, nset=all, generate
   1,  120,    1
*Elset, elset=all, generate
  1,  29,   1
*Nset, nset=n1
 59,
*Nset, nset=n2
 62,
*Nset, nset=sideline, generate
  1,  59,   2
*Elset, elset=sideline, generate
  1,  29,   1
*Nset, nset=xyface, generate
   1,  120,    1
*Elset, elset=xyface, generate
  1,  29,   1
*Nset, nset=xzface, generate
   1,  120,    1
*Elset, elset=xzface, generate
  1,  29,   1
*Nset, nset=yzface
  1,  2, 61, 62
*Elset, elset=yzface
 1,
** Make the dummy mesh, shares nodes with the real mesh,
**  allows visualization of the results, access to
**  hourglass controls, and access to mechanical,
**  traction-type boundary conditions
*Element, type=C3D8
10001,  61,  62,  64,  63,   1,   2,   4,   3
10002,  63,  64,  66,  65,   3,   4,   6,   5
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*Elset, elset=ElDummy, generate
10001,  10029,    1
**
** make a dummy element which is not connected to anything with CPE4T
**  just so that we can have the coupled thermal-displacement step
**
*Node
999996,  0.0, 0.0
999997,  .000001, 0.0
999998,  .000001, .000001
999999,  0.0, .000001
*Nset, nset=tempElement
999996,999997,999998,999999
*Element, Type=CPE4T
999999,999996,999997,999998,999999
*Elset,elset=tempElement
999999
************************************************************************
**			MATERIAL DEFINITION *Include, Input=parameter.inp
************************************************************************
**
** Material properties for the real material
**
*uel property,elset=all
<alpha>,<alpha2>,<alpha3>,<alpha_Gc>,<alpha_Gc2>,<alpha_Gc3>,<alpha_v>,<alpha_v2>,
<alpha_v3>,<alpha_d>,<alpha_d2>,<alpha_d3>,<alpha_mu>,<alpha_k>,<Gc>,<Gc2>,
<Gc3>,<vel>,<vel2>,<vel3>,<diff>,<diff2>,<diff3>,<c0>,
<c02>,<c03>,<k_s>,<k_c_normal>,<k_c_para>,<alpha_normal>,<alpha_para>,<lam_c>,
<lam_s>,<mu_c>,<mu_s>,<epsilon1>,<epsilon2>,<epsilon3>,<delta_v1>,<delta_v2>,
<delta_v3>,<nlSdv>,<ngSdv>,<nInt>
** Dummy mesh material properties
**
*Solid section, elset=tempElement, material=Material-2
*Solid section, elset=ElDummy, material=Material-1
**
*Material, name=Material-2
*Elastic
1.e-20
*Conductivity
1.0
*Density
1.0
*Specific heat
1.0
**
*Material, name=Material-1
*User output variables
<ngSdv>
*Elastic
1.e-20
**
**
**
************************************************************************
**			INITIAL CONDITIONS
************************************************************************
**
*Initial conditions, type=temperature
all,<initc>,<initc2>,<initc3>
**
*Initial conditions, type=temperature
tempElement,0.0,0.0,0.0
**
************************************************************************
**			STEP DEFINITION
************************************************************************
*Step, Name=migration1, nlgeom=yes, inc=100000
*Coupled temperature-displacement, steady state
0.1,<time1>,1.e-6,1.0
*CONTROLS, PARAMETERS=LINE SEARCH
10,1.0,0.0001,0.25,0.10
*CONTROLS, PARAMETERS=TIME INCREMENTATION
,,,,,,,30,,,,,,
**
**
** BOUNDARY CONDITIONS
**
** Name: xysym Type: Symmetry/Antisymmetry/Encastre
*Boundary
xyface, ZSYMM
** Name: xzsym Type: Symmetry/Antisymmetry/Encastre
*Boundary
xzface, YSYMM
** Name: yzsym Type: Symmetry/Antisymmetry/Encastre
*Boundary
yzface, XSYMM
**
*Boundary
tempElement,encastre
tempElement,11,11,0.0
tempElement,12,12,0.0
tempElement,13,13,0.0
**
*Output, field
*node output, nset=all
u,nt
*element output, elset=ElDummy
uvarm,le
*End Step
************************************************************************
*Step, Name=migration2, nlgeom=yes, inc=100000
*Coupled temperature-displacement, steady state
0.1,<time2>,1.e-6,1.0
*CONTROLS, PARAMETERS=LINE SEARCH
10,1.0,0.0001,0.25,0.10
*CONTROLS, PARAMETERS=TIME INCREMENTATION
,,,,,,,30,,,,,,
**
**
** BOUNDARY CONDITIONS
**
** Name: xysym Type: Symmetry/Antisymmetry/Encastre
*Boundary
xyface, ZSYMM
** Name: xzsym Type: Symmetry/Antisymmetry/Encastre
*Boundary
xzface, YSYMM
** Name: yzsym Type: Symmetry/Antisymmetry/Encastre
*Boundary
yzface, XSYMM
**
*Boundary
tempElement,encastre
tempElement,11,11,0.0
tempElement,12,12,0.0
tempElement,13,13,0.0
**
*Output, field
*node output, nset=all
u,nt
*element output, elset=ElDummy
uvarm,le
*End Step
************************************************************************
*Step, Name=migration3, nlgeom=yes, inc=100000
*Coupled temperature-displacement, steady state
0.1,<time3>,1.e-6,1.0
*CONTROLS, PARAMETERS=LINE SEARCH
10,1.0,0.0001,0.25,0.10
*CONTROLS, PARAMETERS=TIME INCREMENTATION
,,,,,,,30,,,,,,
**
**
** BOUNDARY CONDITIONS
**
** Name: xysym Type: Symmetry/Antisymmetry/Encastre
*Boundary
xyface, ZSYMM
** Name: xzsym Type: Symmetry/Antisymmetry/Encastre
*Boundary
xzface, YSYMM
** Name: yzsym Type: Symmetry/Antisymmetry/Encastre
*Boundary
yzface, XSYMM
**
*Boundary
tempElement,encastre
tempElement,11,11,0.0
tempElement,12,12,0.0
tempElement,13,13,0.0
**
*Output, field
*node output, nset=all
u,nt
*element output, elset=ElDummy
uvarm,le
*End Step
